** O carregamento S_FASEI_REV foi somada uma constante devido ao efeito Poisson
**
** no revestimento de 17985107.9077 Pa.
**
**
** PARTS
**
*Part, name=Analise-3
*End Part
**
**
** ASSEMBLY
**
*Assembly, name=Assembly
**
*Instance, name=HydraPartInstance, part=Analise-3
*Node
      1,  0.125412494,       -3200.
      2,  0.108445302,       -3200.
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*Element, type=CAX4
  1,    1,   21, 2070,  264
  2,   21,   22, 2071, 2070
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*Node
   8422,           0.,       -2500.,           0.
*Nset, nset=HydraPartInstance-RefPt_, internal
8422,
*Nset, nset=MESH_TT_ROCK_FAR
   13,   14,   15,   16,   17,   18
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*Elset, elset=MESH_TT_ROCK_FAR
 2721, 2722, 2723, 2724, 2725, 2726
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*Nset, nset=MESH_TT_ROCK_NEAR
    9,   10,   11,   12,   14,   15
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*Elset, elset=MESH_TT_ROCK_NEAR
 4961, 5080, 5081, 5200, 5201, 5320
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*Nset, nset=MESH_VERTICAL
    1,    2,    3,    4,    5,    6
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*Elset, elset=MESH_VERTICAL
    1,    4,    5,    8,    9,   12
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*Nset, nset=MESH_TT_PIPES
   1,   2,   3,   4,   5,   6
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*Elset, elset=MESH_TT_PIPES
    1,    2,    3,    4,  477,  478
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*Nset, nset=MESH_TT_ANNULARS
    1,    4,    6,    7,    9,   10
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*Elset, elset=MESH_TT_ANNULARS
 1121, 1240, 1241, 1360, 1361, 1480
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*Nset, nset=ALL, generate
    1,  8421,     1
*Elset, elset=ALL, generate
    1,  8000,     1
*Nset, nset=ROCK_BC
   13,   16,   18,   19, 1250, 1251
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*Elset, elset=ROCK_BC
 2721, 2729, 2737, 2745, 2753, 2761
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*Nset, nset=YSYM_TOP
    7,    8,   12,   19,   20,  427
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*Elset, elset=YSYM_TOP
 1117, 1118, 1119, 1120, 2081, 2241
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*Nset, nset=YSYM_BASE
    3,    4,    9,   15,   16,  143
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*Elset, elset=YSYM_BASE
  477,  478,  479,  480, 1240, 1360
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*Nset, nset=FASEI_REV
    1,    2,    3,    4,    5,    6
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*Elset, elset=FASEI_REV
    1,    2,    3,    4,    5,    6
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*Elset, elset=FASEI_FLUIDO
 1121, 1122, 1123, 1124, 1125, 1126
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*Nset, nset=FASEI_SLAVE
    9,   10,   11,   12,   14,   15
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*Elset, elset=FASEI_SLAVE
 4961, 4962, 4963, 4964, 4965, 4966
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*Nset, nset=FASEI
    1,    2,    3,    4,    5,    6
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*Elset, elset=FASEI
    1,    2,    3,    4,    5,    6
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*Nset, nset=L1-I
   11,   12,   17,   18,   19,   20
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*Elset, elset=L1-I
 3681, 3682, 3683, 3684, 3685, 3686
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*Nset, nset=L2-I
   10,   11,   13,   14,   17,   18
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*Elset, elset=L2-I, generate
 6561,  8000,     1
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*Nset, nset=L3-I
    9,   10,   13,   14,   15,   16
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*Elset, elset=L3-I
 2721, 2722, 2723, 2724, 2725, 2726
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*Nset, nset=FASEI_WELL_CIMENTO_BASE
    9,   10,   11,   12,  592,  593
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*Nset, nset=ROCK_OUTPUT
    9,   10,   11,   12,   14,   15
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*Elset, elset=ROCK_OUTPUT
 4961, 4962, 4963, 4964, 4965, 4966
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*Elset, elset=_FASEI_REV_S2, internal
    4,    8,   12,   16,   20,   24
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*Elset, elset=_FASEI_REV_S3, internal
  477,  478,  479,  480, 1117, 1118, 1119, 1120
*Elset, elset=_FASEI_REV_S4, internal
    1,    5,    9,   13,   17,   21
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*Surface, type=ELEMENT, name=FASEI_REV
_FASEI_REV_S2, S2
_FASEI_REV_S3, S3
_FASEI_REV_S4, S4
*Elset, elset=_FASEI_ANNULAR_S4, internal
    1,    5,    9,   13,   17,   21
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*Elset, elset=_FASEI_ANNULAR_S2, internal
  484,  488,  492,  496,  500,  504
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*Elset, elset=_FASEI_ANNULAR_S1, internal
 4961, 4962, 4963, 4964, 4965, 4966
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*Elset, elset=_FASEI_ANNULAR_S3, internal, generate
 7881,  8000,     1
*Surface, type=ELEMENT, name=FASEI_ANNULAR
_FASEI_ANNULAR_S4, S4
_FASEI_ANNULAR_S2, S2
_FASEI_ANNULAR_S1, S1
_FASEI_ANNULAR_S3, S3
*Elset, elset=_FASEI_FLUIDO_S4, internal
    1,    5,    9,   13,   17,   21
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*Elset, elset=_FASEI_FLUIDO_S2, internal, generate
  484,  1120,     4
*Elset, elset=_FASEI_FLUIDO_S1, internal
 4961, 4962, 4963, 4964, 4965, 4966
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*Elset, elset=_FASEI_FLUIDO_S3, internal, generate
 7881,  8000,     1
*Surface, type=ELEMENT, name=FASEI_FLUIDO
_FASEI_FLUIDO_S4, S4
_FASEI_FLUIDO_S2, S2
_FASEI_FLUIDO_S1, S1
_FASEI_FLUIDO_S3, S3
*Elset, elset=_FASEI_MASTER_S4, internal
    1,    5,    9,   13,   17,   21
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*Elset, elset=_FASEI_MASTER_S2, internal, generate
  484,  1120,     4
*Surface, type=ELEMENT, name=FASEI_MASTER
_FASEI_MASTER_S4, S4
_FASEI_MASTER_S2, S2
*Elset, elset=_FASEI_WELL_S1, internal
 4961, 4962, 4963, 4964, 4965, 4966
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*Elset, elset=_FASEI_WELL_S3, internal, generate
 7881,  8000,     1
*Surface, type=ELEMENT, name=FASEI_WELL
_FASEI_WELL_S1, S1
_FASEI_WELL_S3, S3
*Elset, elset=_FASEI_OPEN_WELL_S1, internal
 4961, 4962, 4963, 4964, 4965, 4966
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*Elset, elset=_FASEI_OPEN_WELL_S3, internal, generate
 7881,  8000,     1
*Surface, type=ELEMENT, name=FASEI_OPEN_WELL
_FASEI_OPEN_WELL_S1, S1
_FASEI_OPEN_WELL_S3, S3
*Elset, elset=_FASEI_COMPLETED_WELL_S2, internal
    4,    8,   12,   16,   20,   24
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*Elset, elset=_FASEI_COMPLETED_WELL_S4, internal, generate
  481,  1117,     4
*Surface, type=ELEMENT, name=FASEI_COMPLETED_WELL
_FASEI_COMPLETED_WELL_S2, S2
_FASEI_COMPLETED_WELL_S4, S4
** Section: VM11013CRSS
*Solid Section, elset=FASEI_REV, material=VM11013CRSS
,
** Section: FLUIDO
*Solid Section, elset=FASEI_FLUIDO, material=FLUIDO
,
** Section: L3-I-HALITA
*Solid Section, elset=L3-I, material=L3-I-HALITA
,
** Section: L1-I-FOLHELHO
*Solid Section, elset=L1-I, material=L1-I-FOLHELHO
,
** Section: L2-I-ARENITO
*Solid Section, elset=L2-I, material=L2-I-ARENITO
,
** Block added by user *******
** DUMMY COPY OF FASEI
*Elcopy, old set=FASEI, new set = _dummy1, element shift=900000, shift nodes=0
*Elset, elset= DUMMY_FASEI
_dummy1
** Section: DUMMY_FASEI
*Solid Section, elset=DUMMY_FASEI, material=FLUIDO
,
******************************
*End Instance
**
*Nset, nset=L3-I_EQ1_N1, instance=HydraPartInstance
 710,
*Nset, nset=L3-I_EQ1_N2, instance=HydraPartInstance
 708, 709
*Nset, nset=L3-I_EQ2_N1, instance=HydraPartInstance
 592,
*Nset, nset=L3-I_EQ2_N2, instance=HydraPartInstance
 593, 594
*Surface, type=NODE, name=HydraPartInstance_FASEI_SLAVE_CNS_, internal
HydraPartInstance.FASEI_SLAVE, 1.
** Constraint: L3-I_EQ1
*Equation
2
L3-I_EQ1_N2, 1, 1.
L3-I_EQ1_N1, 1, -1.
** Constraint: L3-I_EQ2
*Equation
2
L3-I_EQ2_N2, 1, 1.
L3-I_EQ2_N1, 1, -1.
*End Assembly
**
** MATERIALS
**
*Material, name=FLUIDO
*Conductivity
 0.702,
*Density
1.,
*Elastic
10000.,0.
*Specific Heat
2060.,
*Material, name=L1-I-FOLHELHO
*Conductivity
 1.592,
*Density
 2332.74,
*Elastic
 2.00017e+10, 0.29
*Specific Heat
 0.209946,
*Mohr Coulomb
28.,7.
*Mohr Coulomb Hardening
 2.00017e+07,0.
*Material, name=L2-I-ARENITO
*Conductivity
 1.869,
*Density
 1780.09,
*Elastic
 2.4062e+10, 0.25
*Specific Heat
 0.209946,
*Mohr Coulomb
30., 7.5
*Mohr Coulomb Hardening
 2.00017e+07,0.
*Material, name=L3-I-HALITA
*Conductivity
 5.55,
** Block replaced by user ****
*Creep, law=DOUBLE POWER
0.0077864000,6042.9046228220,2.9400000000,0.0076093000,6042.9046228220,8.1500000000,10300006.1216400005
******************************
*Density
 1780.09,
*Elastic
 2.04e+10, 0.36
*Specific Heat
 0.209946,
*Material, name=VM11013CRSS
*Conductivity
 45.3452,
*Density
7950.,
*Elastic
 2.06843e+11, 0.3
*Plastic
 7.58424e+08,     0., 273.15
 7.58424e+08,   0.25, 273.15
 7.56376e+08,     0., 298.15
 7.56376e+08,   0.25, 298.15
  7.2566e+08,     0., 373.15
  7.2566e+08,   0.25, 373.15
 7.05182e+08,     0., 423.15
 7.05182e+08,   0.25, 423.15
 6.84705e+08,     0., 473.15
 6.84705e+08,   0.25, 473.15
 6.64227e+08,     0., 523.15
 6.64227e+08,   0.25, 523.15
*Specific Heat
 342.219,
**
** INTERACTION PROPERTIES
**
*Surface Interaction, name=C_FASEI
1.,
*Friction, slip tolerance=0.005
 0.5,
*Surface Behavior, pressure-overclosure=HARD
*Time Points, name=timePoint
1., 3600., 7200., 14400., 28800., 57600., 86400., 172800.
345600., 691200., 1.3824e+06, 2.7648e+06, 5.5296e+06, 1.10592e+07, 2.21184e+07, 3.1536e+07
6.3072e+07, 1.26144e+08, 2.52288e+08, 5.04576e+08, 9.4608e+08
**
** PHYSICAL CONSTANTS
**
*Physical Constants, absolute zero=0.
**
** BOUNDARY CONDITIONS
**
** Name: FIX_FASEI_WELL Type: Symmetry/Antisymmetry/Encastre
*Boundary
HydraPartInstance.FASEI_WELL_CIMENTO_BASE, XSYMM
** Name: PIN_FASEI Type: Symmetry/Antisymmetry/Encastre
*Boundary
HydraPartInstance.FASEI_REV, PINNED
** Name: XSYM_ROCK_BC Type: Symmetry/Antisymmetry/Encastre
*Boundary
HydraPartInstance.ROCK_BC, XSYMM
** Name: YSYM_BASE Type: Symmetry/Antisymmetry/Encastre
*Boundary
HydraPartInstance.YSYM_BASE, YSYMM
** Name: YSYM_TOP Type: Symmetry/Antisymmetry/Encastre
*Boundary
HydraPartInstance.YSYM_TOP, YSYMM
**
** PREDEFINED FIELDS
**
** Name: S_FASEI_REV   Type: Geostatic stress
*Initial Conditions, type=STRESS, GEOSTATIC
HydraPartInstance.FASEI_REV, 1.33997e+08, -2000., -2.19818e+07, -4000., 0., 0.
** Name: S_L1-I   Type: Geostatic stress
*Initial Conditions, type=STRESS, GEOSTATIC
HydraPartInstance.L1-I, -3.14128e+07, -2500., -4.05664e+07, -2900., 1., 1.
** Name: S_L2-I   Type: Geostatic stress
*Initial Conditions, type=STRESS, GEOSTATIC
HydraPartInstance.L2-I, -4.05664e+07, -2900., -4.58052e+07, -3200., 1., 1.
** Name: S_L3-I   Type: Geostatic stress
*Initial Conditions, type=STRESS, GEOSTATIC
HydraPartInstance.L3-I, -4.58052e+07, -3200., -5.1044e+07, -3500., 1., 1.
**
** INTERACTIONS
**
** Interaction: C_FASEI
*Contact Pair, interaction=C_FASEI, type=SURFACE TO SURFACE
HydraPartInstance_FASEI_SLAVE_CNS_, HydraPartInstance.FASEI_MASTER
** ----------------------------------------------------------------
**
** STEP: Geostatic
**
*Step, name=Geostatic, nlgeom=YES
*Geostatic
**
** LOADS
**
** Name: GRAVITY   Type: Gravity
*Dload, op=NEW
, GRAV, 9.81, , -1.
**
** INTERACTIONS
**
** Interaction: C_FASEI
*Model Change, type=CONTACT PAIR, remove
HydraPartInstance_FASEI_SLAVE_CNS_, HydraPartInstance.FASEI_MASTER
** Interaction: MC_FASEI_FLUIDO
*Model Change, remove
HydraPartInstance.FASEI_FLUIDO,
** Interaction: MC_FASEI_REV
*Model Change, remove
HydraPartInstance.FASEI_REV,
**
** CONTROLS
**
*Controls, reset
*Controls, parameters=field, field=displacement
5e-05, , , , , , ,
*Controls, parameters=field, field=rotation
5e-05, , , , , , ,
**
** OUTPUT REQUESTS
**
*Restart, write, frequency=0
**
** FIELD OUTPUT: FASEI_REV
**
*Output, field
*Node Output, nset=HydraPartInstance.FASEI_REV
NT, U
*Element Output, elset=HydraPartInstance.FASEI_REV, directions=YES
E, MISES, PE, S, PEEQ
**
** FIELD OUTPUT: ROCK_OUTPUT
**
*Node Output, nset=HydraPartInstance.ROCK_OUTPUT
U,
*Element Output, elset=HydraPartInstance.ROCK_OUTPUT, directions=YES
TEMP,
*Output, history, frequency=0
*End Step
** ----------------------------------------------------------------
**
** STEP: Transition
**
*Step, name=Transition, nlgeom=YES
*Static
1., 2., 2e-05, 2.
**
** LOADS
**
** Name: GRAVITY   Type: Gravity
*Dload, op=NEW
, GRAV, 9.81, , -1.
**
** OUTPUT REQUESTS
**
*Restart, write, frequency=0
**
** FIELD OUTPUT: FASEI_REV
**
*Output, field, time points=timePoint
*Node Output, nset=HydraPartInstance.FASEI_REV
NT, U
*Element Output, elset=HydraPartInstance.FASEI_REV, directions=YES
E, MISES, PE, S, PEEQ
**
** FIELD OUTPUT: ROCK_OUTPUT
**
*Node Output, nset=HydraPartInstance.ROCK_OUTPUT
U,
*Element Output, elset=HydraPartInstance.ROCK_OUTPUT, directions=YES
TEMP,
*Output, history, frequency=0
*End Step
** ----------------------------------------------------------------
**
** STEP: TempDefine
**
*Step, name=TempDefine, nlgeom=YES
*Static
1., 3., 3e-05, 3.
**
** LOADS
**
** Name: GRAVITY   Type: Gravity
*Dload, op=NEW
, GRAV, 9.81, , -1.
**
** PREDEFINED FIELDS
**
** Name: NT_FASEI   Type: Temperature Using Field: Geotermico
*Temperature
HydraPartInstance.1, 319.75
HydraPartInstance.2, 319.75
HydraPartInstance.3, 330.312
HydraPartInstance.4, 330.312
HydraPartInstance.5, 309.1
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HydraPartInstance.6754, 319.661
** Name: NT_FASEI_ID   Type: Temperature Using Field: Geotermico
*Temperature
HydraPartInstance.2, 319.75
HydraPartInstance.3, 330.312
HydraPartInstance.5, 309.1
HydraPartInstance.8, 294.988
HydraPartInstance.24, 319.839
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HydraPartInstance.832, 319.661
** Name: NT_L1-I   Type: Temperature Using Field: NT_L1-I
*Temperature
HydraPartInstance.11, 309.1
HydraPartInstance.12, 294.9
HydraPartInstance.17, 309.1
HydraPartInstance.18, 309.1
HydraPartInstance.19, 294.9
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HydraPartInstance.7231, 309.011
** Name: NT_L1-I_OD   Type: Temperature Using Field: NT_L1-I
*Temperature
HydraPartInstance.18, 309.1
HydraPartInstance.19, 294.9
HydraPartInstance.1376, 309.011
HydraPartInstance.1377, 308.923
HydraPartInstance.1378, 308.834
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HydraPartInstance.1534, 294.989
** Name: NT_L2-I   Type: Temperature Using Field: NT_L2-I
*Temperature
HydraPartInstance.10, 319.75
HydraPartInstance.11, 309.1
HydraPartInstance.13, 319.75
HydraPartInstance.14, 319.75
HydraPartInstance.17, 309.1
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HydraPartInstance.8421, 309.189
** Name: NT_L2-I_OD   Type: Temperature Using Field: NT_L2-I
*Temperature
HydraPartInstance.13, 319.75
HydraPartInstance.18, 309.1
HydraPartInstance.1951, 319.661
HydraPartInstance.1952, 319.573
HydraPartInstance.1953, 319.484
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HydraPartInstance.2069, 309.189
** Name: NT_L3-I   Type: Temperature Using Field: NT_L3-I
*Temperature
HydraPartInstance.9, 330.4
HydraPartInstance.10, 319.75
HydraPartInstance.13, 319.75
HydraPartInstance.14, 319.75
HydraPartInstance.15, 330.4
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HydraPartInstance.6397, 330.311
** Name: NT_L3-I_OD   Type: Temperature Using Field: NT_L3-I
*Temperature
HydraPartInstance.13, 319.75
HydraPartInstance.16, 330.4
HydraPartInstance.1250, 330.311
HydraPartInstance.1251, 330.222
HydraPartInstance.1252, 330.134
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HydraPartInstance.1368, 319.839
**
** OUTPUT REQUESTS
**
*Restart, write, frequency=0
**
** FIELD OUTPUT: FASEI_REV
**
*Output, field, time points=timePoint
*Node Output, nset=HydraPartInstance.FASEI_REV
NT, U
*Element Output, elset=HydraPartInstance.FASEI_REV, directions=YES
E, MISES, PE, S, PEEQ
**
** FIELD OUTPUT: ROCK_OUTPUT
**
*Node Output, nset=HydraPartInstance.ROCK_OUTPUT
U,
*Element Output, elset=HydraPartInstance.ROCK_OUTPUT, directions=YES
TEMP,
*Output, history, frequency=0
*End Step
** ----------------------------------------------------------------
**
** STEP: Perf_10_375
**
*Step, name=Perf_10_375, nlgeom=YES
*Static
1., 1., 1e-15, 1.
**
** BOUNDARY CONDITIONS
**
** Name: FIX_FASEI_WELL Type: Symmetry/Antisymmetry/Encastre
*Boundary, op=NEW
** Name: PIN_FASEI Type: Symmetry/Antisymmetry/Encastre
*Boundary, op=NEW
HydraPartInstance.FASEI_REV, PINNED
** Name: XSYM_ROCK_BC Type: Symmetry/Antisymmetry/Encastre
*Boundary, op=NEW
HydraPartInstance.ROCK_BC, XSYMM
** Name: YSYM_BASE Type: Symmetry/Antisymmetry/Encastre
*Boundary, op=NEW
HydraPartInstance.YSYM_BASE, YSYMM
** Name: YSYM_TOP Type: Symmetry/Antisymmetry/Encastre
*Boundary, op=NEW
HydraPartInstance.YSYM_TOP, YSYMM
**
** LOADS
**
** Name: GRAVITY   Type: Gravity
*Dload, op=NEW
, GRAV, 9.81, , -1.
** Name: P_FASEI_OPEN_WELL   Type: Pressure Using Field: P_FASEI_OPEN_WELL
*Dload, op=NEW
HydraPartInstance.4961, P1, 3.1986e+07
HydraPartInstance.4962, P1, 3.2011e+07
HydraPartInstance.4963, P1, 3.2036e+07
HydraPartInstance.4964, P1, 3.2061e+07
HydraPartInstance.4965, P1, 3.20859e+07
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HydraPartInstance.8000, P3, 2.89885e+07
**
** OUTPUT REQUESTS
**
*Restart, write, frequency=0
**
** FIELD OUTPUT: FASEI_REV
**
*Output, field, time points=timePoint
*Node Output, nset=HydraPartInstance.FASEI_REV
NT, U
*Element Output, elset=HydraPartInstance.FASEI_REV, directions=YES
E, MISES, PE, S, PEEQ
**
** FIELD OUTPUT: ROCK_OUTPUT
**
*Node Output, nset=HydraPartInstance.ROCK_OUTPUT
U,
*Element Output, elset=HydraPartInstance.ROCK_OUTPUT, directions=YES
TEMP,
*Output, history, frequency=0
*End Step
** ----------------------------------------------------------------
**
** STEP: Perf_10_375_Creep
**
*Step, name=Perf_10_375_Creep, nlgeom=YES, inc=1000000
*Visco, cetol=0.01
1., 172800., 1e-15, 172800.
**
** LOADS
**
** Name: GRAVITY   Type: Gravity
*Dload, op=NEW
, GRAV, 9.81, , -1.
** Name: P_FASEI_OPEN_WELL   Type: Pressure Using Field: P_FASEI_OPEN_WELL
*Dload, op=NEW
HydraPartInstance.4961, P1, 3.1986e+07
HydraPartInstance.4962, P1, 3.2011e+07
HydraPartInstance.4963, P1, 3.2036e+07
HydraPartInstance.4964, P1, 3.2061e+07
HydraPartInstance.4965, P1, 3.20859e+07
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HydraPartInstance.8000, P3, 2.89885e+07
**
** OUTPUT REQUESTS
**
*Restart, write, frequency=0
**
** FIELD OUTPUT: FASEI_REV
**
*Output, field, time points=timePoint
*Node Output, nset=HydraPartInstance.FASEI_REV
NT, U
*Element Output, elset=HydraPartInstance.FASEI_REV, directions=YES
E, MISES, PE, S, PEEQ
**
** FIELD OUTPUT: ROCK_OUTPUT
**
*Node Output, nset=HydraPartInstance.ROCK_OUTPUT
U,
*Element Output, elset=HydraPartInstance.ROCK_OUTPUT, directions=YES
TEMP,
*Output, history, frequency=0
*End Step
** ----------------------------------------------------------------
**
** STEP: Rev_9_875
**
*Step, name=Rev_9_875, nlgeom=YES
*Static
1., 1., 1e-15, 1.
**
** BOUNDARY CONDITIONS
**
** Name: PIN_FASEI Type: Symmetry/Antisymmetry/Encastre
*Boundary, op=NEW
** Name: XSYM_ROCK_BC Type: Symmetry/Antisymmetry/Encastre
*Boundary, op=NEW
HydraPartInstance.ROCK_BC, XSYMM
** Name: YSYM_BASE Type: Symmetry/Antisymmetry/Encastre
*Boundary, op=NEW
HydraPartInstance.YSYM_BASE, YSYMM
** Name: YSYM_TOP Type: Symmetry/Antisymmetry/Encastre
*Boundary, op=NEW
HydraPartInstance.YSYM_TOP, YSYMM
**
** LOADS
**
** Name: GRAVITY   Type: Gravity
*Dload, op=NEW
, GRAV, 9.81, , -1.
** Name: P_FASEI_COMPLETED_WELL   Type: Pressure Using Field: P_FASEI_COMPLETED_WELL
*Dload, op=NEW
HydraPartInstance.4, P2, 3.1986e+07
HydraPartInstance.8, P2, 3.2011e+07
HydraPartInstance.12, P2, 3.2036e+07
HydraPartInstance.16, P2, 3.2061e+07
HydraPartInstance.20, P2, 3.20859e+07
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HydraPartInstance.2080, P2, 3.1961e+07
** Name: P_FASEI_FLUIDO   Type: Pressure Using Field: P_FASEI_FLUIDO
*Dload, op=NEW
HydraPartInstance.1, P4, 3.1986e+07
HydraPartInstance.5, P4, 3.2011e+07
HydraPartInstance.9, P4, 3.2036e+07
HydraPartInstance.13, P4, 3.2061e+07
HydraPartInstance.17, P4, 3.20859e+07
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HydraPartInstance.8000, P3, 2.89885e+07
** Name: P_FASEI_OPEN_WELL   Type: Pressure Using Field: P_FASEI_OPEN_WELL
*Dload, op=NEW
**
** INTERACTIONS
**
** Interaction: C_FASEI
*Model Change, type=CONTACT PAIR, add
HydraPartInstance_FASEI_SLAVE_CNS_, HydraPartInstance.FASEI_MASTER
** Interaction: MC_FASEI_REV
*Model Change, add
HydraPartInstance.FASEI_REV,
**
** OUTPUT REQUESTS
**
** Block added by user *******
*Model Change, remove
HydraPartInstance.DUMMY_FASEI,
******************************
*Restart, write, frequency=0
**
** FIELD OUTPUT: FASEI_REV
**
*Output, field, time points=timePoint
*Node Output, nset=HydraPartInstance.FASEI_REV
NT, U
*Element Output, elset=HydraPartInstance.FASEI_REV, directions=YES
E, MISES, PE, S, PEEQ
**
** FIELD OUTPUT: ROCK_OUTPUT
**
*Node Output, nset=HydraPartInstance.ROCK_OUTPUT
U,
*Element Output, elset=HydraPartInstance.ROCK_OUTPUT, directions=YES
TEMP,
*Output, history, frequency=0
*End Step
** ----------------------------------------------------------------
**
** STEP: Rev_9_875_Creep
**
*Step, name=Rev_9_875_Creep, nlgeom=YES, inc=1000000
*Visco, cetol=0.01
1., 9.45907e+08, 1e-15, 1.5552e+07
**
** LOADS
**
** Name: GRAVITY   Type: Gravity
*Dload, op=NEW
, GRAV, 9.81, , -1.
** Name: P_FASEI_COMPLETED_WELL   Type: Pressure Using Field: P_FASEI_COMPLETED_WELL
*Dload, op=NEW
HydraPartInstance.4, P2, 3.1986e+07
HydraPartInstance.8, P2, 3.2011e+07
HydraPartInstance.12, P2, 3.2036e+07
HydraPartInstance.16, P2, 3.2061e+07
HydraPartInstance.20, P2, 3.20859e+07
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HydraPartInstance.2080, P2, 3.1961e+07
** Name: P_FASEI_FLUIDO   Type: Pressure Using Field: P_FASEI_FLUIDO
*Dload, op=NEW
HydraPartInstance.1, P4, 3.1986e+07
HydraPartInstance.5, P4, 3.2011e+07
HydraPartInstance.9, P4, 3.2036e+07
HydraPartInstance.13, P4, 3.2061e+07
HydraPartInstance.17, P4, 3.20859e+07
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HydraPartInstance.8000, P3, 2.89885e+07
**
** OUTPUT REQUESTS
**
*Restart, write, frequency=0
**
** FIELD OUTPUT: FASEI_REV
**
*Output, field, time points=timePoint
*Node Output, nset=HydraPartInstance.FASEI_REV
NT, U
*Element Output, elset=HydraPartInstance.FASEI_REV, directions=YES
E, MISES, PE, S, PEEQ
**
** FIELD OUTPUT: ROCK_OUTPUT
**
*Node Output, nset=HydraPartInstance.ROCK_OUTPUT
U,
*Element Output, elset=HydraPartInstance.ROCK_OUTPUT, directions=YES
TEMP,
*Output, history, frequency=0
*End Step
