*Heading
** Job name: WellClosureJob Model name: MyFirstModel
** Generated by: Abaqus/CAE 2024
*Preprint, echo=NO, model=NO, history=NO, contact=NO
**
** PARTS
**
*Part, name=FLUID
*End Part
**
*Part, name=PIPE
*End Part
**
*Part, name=ROCK
*End Part
**
**
** ASSEMBLY
**
*Assembly, name=Assembly
**
*Instance, name=FLUID_INST, part=FLUID
*Node
      1,  0.155575007,       -5200.
      2,   0.14088428,       -5200.
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*Element, type=CAX4
  1,    1,   21, 1423,  142
  2,   21,   22, 1424, 1423
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*Nset, nset=FASEI_FLUIDO, generate
    1,  2804,     1
*Elset, elset=FASEI_FLUIDO, generate
    1,  2100,     1
*Nset, nset=FASEI_FLUIDO_BASE
  3,  4, 82, 83
*Elset, elset=FASEI_FLUIDO_BASE, generate
 178,  180,    1
*Nset, nset=FASEI_FLUIDO_ID
    2,    3,    6,    8,   10,   12
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*Elset, elset=FASEI_FLUIDO_ID
    3,    6,    9,   12,   15,   18
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*Nset, nset=FASEI_FLUIDO_OD
    1,    4,    5,    7,    9,   11
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*Elset, elset=FASEI_FLUIDO_OD
    1,    4,    7,   10,   13,   16
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*Nset, nset=FASEI_FLUIDO_TOP
   19,   20, 1322, 1323
*Elset, elset=FASEI_FLUIDO_TOP, generate
 2098,  2100,     1
*Nset, nset=FASEI_ANNULAR, generate
    1,  2804,     1
*Elset, elset=FASEI_ANNULAR, generate
    1,  2100,     1
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** Section: FLUID_Section
*Solid Section, elset=FASEI_FLUIDO, material=FLUID
1.,
*End Instance
**
*Instance, name=PIPE_INST, part=PIPE
*Node
      1,   0.14088428,       -5200.
      2,  0.125009269,       -5200.
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*Element, type=CAX4
  1,    1,   21, 1423,  142
  2,   21,   22, 1424, 1423
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*Nset, nset=FASEI_REV, generate
    1,  2804,     1
*Elset, elset=FASEI_REV, generate
    1,  2100,     1
*Nset, nset=FASEI_REV_ABOVE_TOC, generate
    1,  2804,     1
*Elset, elset=FASEI_REV_ABOVE_TOC, generate
    1,  2100,     1
*Nset, nset=FASEI_REV_BASE
  3,  4, 82, 83
*Elset, elset=FASEI_REV_BASE, generate
 178,  180,    1
*Nset, nset=FASEI_REV_ID
    2,    3,    6,    8,   10,   12
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*Elset, elset=FASEI_REV_ID
    3,    6,    9,   12,   15,   18
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*Nset, nset=FASEI_REV_OD
    1,    4,    5,    7,    9,   11
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*Elset, elset=FASEI_REV_OD
    1,    4,    7,   10,   13,   16
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*Nset, nset=FASEI_REV_TOP
   19,   20, 1322, 1323
*Elset, elset=FASEI_REV_TOP, generate
 2098,  2100,     1
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** Section: STEEL_Section
*Solid Section, elset=FASEI_REV, material=STEEL
1.,
*End Instance
**
*Instance, name=ROCK_INST, part=ROCK
*Node
      1,   12.1555748,       -5200.
      2,  0.155575007,       -5200.
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*Element, type=CAX4
   1,    1,   21, 1633,  184
   2,   21,   22, 1634, 1633
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*Node
  17526,           0.,       -2000.,           0.
*Nset, nset=ROCK_INST-RefPt_, internal
17526,
*Nset, nset=RP_TOP_2000
 17526,
*Nset, nset=ALLROCK, generate
     1,  17525,      1
*Elset, elset=ALLROCK, generate
     1,  16800,      1
*Nset, nset=FASEI_SLAVE, generate
     1,  17525,      1
*Elset, elset=FASEI_SLAVE, generate
     1,  16800,      1
*Nset, nset=L1-I_BASE
   17,   18, 1170, 1171, 1172, 1173
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*Elset, elset=L1-I_BASE, generate
 14377,  14424,      1
*Nset, nset=L2-I_BASE
  15,  16, 819, 820, 821, 822
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*Elset, elset=L2-I_BASE, generate
 9097,  9144,     1
*Nset, nset=L3-I_BASE
  13,  14, 668, 669, 670, 671
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*Elset, elset=L3-I_BASE, generate
 6457,  6504,     1
*Nset, nset=L4-I_BASE
  11,  12, 597, 598, 599, 600
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*Elset, elset=L4-I_BASE, generate
 5977,  6024,     1
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*Nset, nset=L1-I
    17,    18,    19,    20,  1170,  1171
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*Elset, elset=L1-I, generate
 14401,  16800,      1
*Nset, nset=L2-I
    15,    16,    17,    18,   819,   820
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*Elset, elset=L2-I, generate
  9121,  14400,      1
*Nset, nset=L3-I
    13,    14,    15,    16,   668,   669
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*Elset, elset=L3-I, generate
 6481,  9120,     1
*Nset, nset=L4-I
   11,   12,   13,   14,  597,  598
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*Elset, elset=L4-I, generate
 6001,  6480,     1
*Nset, nset=L5-I
    9,   10,   11,   12,  526,  527
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*Elset, elset=L5-I, generate
 5281,  6000,     1
*Nset, nset=L6-I
    7,    8,    9,   10,  385,  386
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*Elset, elset=L6-I, generate
 4801,  5280,     1
*Nset, nset=L7-I
    5,    6,    7,    8,  224,  225
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*Elset, elset=L7-I, generate
 2401,  4800,     1
*Nset, nset=L8-I
    1,    2,    5,    6,   21,   22
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*Elset, elset=L8-I, generate
 1441,  2400,     1
*Nset, nset=L9-I
    1,    2,    3,    4,   21,   22
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*Elset, elset=L9-I, generate
    1,  1440,     1
** Section: LAYER_09_CARBONATE_Section
*Solid Section, elset=L9-I, material=LAYER_09_CARBONATE
1.,
** Section: LAYER_08_ANHYDRITE_Section
*Solid Section, elset=L8-I, material=LAYER_08_ANHYDRITE
1.,
** Section: LAYER_07_HALITE_Section
*Solid Section, elset=L7-I, material=LAYER_07_HALITE
1.,
** Section: LAYER_06_TACHYHYDRITE_Section
*Solid Section, elset=L6-I, material=LAYER_06_TACHYHYDRITE
1.,
** Section: LAYER_05_HALITE_Section
*Solid Section, elset=L5-I, material=LAYER_05_HALITE
1.,
** Section: LAYER_04_CARNALLITE_Section
*Solid Section, elset=L4-I, material=LAYER_04_CARNALLITE
1.,
** Section: LAYER_03_HALITE_Section
*Solid Section, elset=L3-I, material=LAYER_03_HALITE
1.,
** Section: LAYER_02_SANDSTONE_Section
*Solid Section, elset=L2-I, material=LAYER_02_SANDSTONE
1.,
** Section: LAYER_01_SHALE_Section
*Solid Section, elset=L1-I, material=LAYER_01_SHALE
1.,
*End Instance
**
*Nset, nset=ALL, instance=FLUID_INST, generate
    1,  2804,     1
*Nset, nset=ALL, instance=PIPE_INST, generate
    1,  2804,     1
*Nset, nset=ALL, instance=ROCK_INST, generate
     1,  17525,      1
*Elset, elset=ALL, instance=FLUID_INST, generate
    1,  2100,     1
*Elset, elset=ALL, instance=PIPE_INST, generate
    1,  2100,     1
*Elset, elset=ALL, instance=ROCK_INST, generate
     1,  16800,      1
*Nset, nset=FASEI, instance=FLUID_INST, generate
    1,  2804,     1
*Nset, nset=FASEI, instance=PIPE_INST, generate
    1,  2804,     1
*Elset, elset=FASEI, instance=FLUID_INST, generate
    1,  2100,     1
*Elset, elset=FASEI, instance=PIPE_INST, generate
    1,  2100,     1
*Nset, nset=FASEI_COMPLETED_WELL, instance=PIPE_INST
    2,    3,    6,    8,   10,   12
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*Elset, elset=FASEI_COMPLETED_WELL, instance=PIPE_INST
    3,    6,    9,   12,   15,   18
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*Nset, nset=FASEI_OPEN_WELL, instance=ROCK_INST
    2,    3,    6,    8,   10,   12
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*Nset, nset=ROCK_BC, instance=ROCK_INST
    1,    4,    5,    7,    9,   11
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*Elset, elset=ROCK_BC, instance=ROCK_INST
     1,    25,    49,    73,    97,   121
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*Nset, nset=ROCK_OUTPUT, instance=ROCK_INST, generate
     1,  17525,      1
*Elset, elset=ROCK_OUTPUT, instance=ROCK_INST, generate
     1,  16800,      1
*Nset, nset=YSYM_BASE, instance=FLUID_INST
  3,  4, 82, 83
*Nset, nset=YSYM_BASE, instance=PIPE_INST
  3,  4, 82, 83
*Nset, nset=YSYM_BASE, instance=ROCK_INST
   3,   4, 103, 104, 105, 106
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*Nset, nset=YSYM_TOP, instance=FLUID_INST
   19,   20, 1322, 1323
*Nset, nset=YSYM_TOP, instance=PIPE_INST
   19,   20, 1322, 1323
*Nset, nset=YSYM_TOP, instance=ROCK_INST
   19,   20, 1511, 1512, 1513, 1514
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*Elset, elset=_FASEI_ANNULAR_S2, internal, instance=FLUID_INST, generate
    3,  2100,     3
*Elset, elset=_FASEI_ANNULAR_S3, internal, instance=FLUID_INST
  178,  179,  180, 2098, 2099, 2100
*Elset, elset=_FASEI_ANNULAR_S4, internal, instance=FLUID_INST, generate
    1,  2098,     3
*Surface, type=ELEMENT, name=FASEI_ANNULAR
_FASEI_ANNULAR_S2, S2
_FASEI_ANNULAR_S3, S3
_FASEI_ANNULAR_S4, S4
*Elset, elset=_FASEI_COMPLETED_WELL_S2, internal, instance=PIPE_INST, generate
   3,  180,    3
*Elset, elset=_FASEI_COMPLETED_WELL_S4, internal, instance=PIPE_INST, generate
  181,  2098,     3
*Surface, type=ELEMENT, name=FASEI_COMPLETED_WELL
_FASEI_COMPLETED_WELL_S2, S2
_FASEI_COMPLETED_WELL_S4, S4
*Elset, elset=_FASEI_FLUIDO_S4, internal, instance=PIPE_INST, generate
   1,  178,    3
*Elset, elset=_FASEI_FLUIDO_S4, internal, instance=ROCK_INST, generate
  1441,  16777,     24
*Elset, elset=_FASEI_FLUIDO_S2, internal, instance=PIPE_INST, generate
  183,  2100,     3
*Elset, elset=_FASEI_FLUIDO_S2, internal, instance=ROCK_INST, generate
   24,  1440,    24
*Surface, type=ELEMENT, name=FASEI_FLUIDO
_FASEI_FLUIDO_S4, S4
_FASEI_FLUIDO_S2, S2
*Elset, elset=_FASEI_MASTER_S4, internal, instance=PIPE_INST, generate
   1,  178,    3
*Elset, elset=_FASEI_MASTER_S2, internal, instance=PIPE_INST, generate
  183,  2100,     3
*Surface, type=ELEMENT, name=FASEI_MASTER
_FASEI_MASTER_S4, S4
_FASEI_MASTER_S2, S2
*Elset, elset=_FASEI_OPEN_WELL_S2, internal, instance=ROCK_INST, generate
   24,  1440,    24
*Elset, elset=_FASEI_OPEN_WELL_S4, internal, instance=ROCK_INST, generate
  1441,  16777,     24
*Surface, type=ELEMENT, name=FASEI_OPEN_WELL
_FASEI_OPEN_WELL_S2, S2
_FASEI_OPEN_WELL_S4, S4
*Elset, elset=_FASEI_REV_S2, internal, instance=PIPE_INST, generate
    3,  2100,     3
*Elset, elset=_FASEI_REV_S3, internal, instance=PIPE_INST
  178,  179,  180, 2098, 2099, 2100
*Elset, elset=_FASEI_REV_S4, internal, instance=PIPE_INST, generate
    1,  2098,     3
*Surface, type=ELEMENT, name=FASEI_REV
_FASEI_REV_S2, S2
_FASEI_REV_S3, S3
_FASEI_REV_S4, S4
*Elset, elset=_FASEI_WELL_S2, internal, instance=ROCK_INST, generate
   24,  1440,    24
*Elset, elset=_FASEI_WELL_S4, internal, instance=ROCK_INST, generate
  1441,  16777,     24
*Surface, type=ELEMENT, name=FASEI_WELL
_FASEI_WELL_S2, S2
_FASEI_WELL_S4, S4
*Surface, type=NODE, name=ROCK_INST_FASEI_SLAVE_CNS_, internal
ROCK_INST.FASEI_SLAVE, 1.
*End Assembly
**
** MATERIALS
**
*Material, name=FLUID
*Conductivity
 0.702,
*Density
1.,
*Elastic
10000.,0.
*Specific Heat
2060.,
*Material, name=LAYER_01_SHALE
*Conductivity
 1.592,
*Density
 2299.61,
*Elastic
 2.00017e+10, 0.29
*Expansion
 1e-05,
*Specific Heat
 0.209946,
*Mohr Coulomb
28.,7.
*Mohr Coulomb Hardening
 2.00017e+07,0.
*Material, name=LAYER_02_SANDSTONE
*Conductivity
 1.869,
*Density
 2299.92,
*Elastic
 2.4062e+10, 0.25
*Expansion
 1e-05,
*Specific Heat
 0.209946,
*Mohr Coulomb
30., 7.5
*Mohr Coulomb Hardening
 2.00017e+07,0.
*Material, name=LAYER_03_HALITE
*Conductivity
 5.55,
*Creep, law=DOUBLE POWER
 0.0077864,    6042.9,      2.94, 0.0076093,    6042.9,      8.15,  1.03e+07
*Density
 2169.93,
*Elastic
 2.04e+10, 0.36
*Expansion
 1e-05,
*Specific Heat
 0.209946,
*Material, name=LAYER_04_CARNALLITE
*Conductivity
 0.75,
*Creep, law=DOUBLE POWER
 0.13662, 6042.9, 2.8352, 0.1219, 6042.9,    7.5,  6e+06
*Density
 1599.95,
*Elastic
 4.02e+09, 0.36
*Expansion
 1e-05,
*Specific Heat
 0.209946,
*Material, name=LAYER_05_HALITE
*Conductivity
 5.55,
*Creep, law=DOUBLE POWER
 0.0077864,    6042.9,      2.94, 0.0076093,    6042.9,      8.15,  1.03e+07
*Density
 2169.93,
*Elastic
 2.04e+10, 0.36
*Expansion
 1e-05,
*Specific Heat
 0.209946,
*Material, name=LAYER_06_TACHYHYDRITE
*Conductivity
 0.64,
*Creep, law=DOUBLE POWER
 1.0446,  6042.9,     2.5,  1.0551,  6042.9,    8.35, 8.4e+06
*Density
 2169.93,
*Elastic
 4.92e+09, 0.33
*Expansion
 1e-05,
*Specific Heat
 0.209946,
*Material, name=LAYER_07_HALITE
*Conductivity
 5.55,
*Creep, law=DOUBLE POWER
 0.0077864,    6042.9,      2.94, 0.0076093,    6042.9,      8.15,  1.03e+07
*Density
 2169.93,
*Elastic
 2.04e+10, 0.36
*Expansion
 1e-05,
*Specific Heat
 0.209946,
*Material, name=LAYER_08_ANHYDRITE
*Conductivity
 6.006,
*Density
 2918.35,
*Elastic
 3.09988e+10, 0.36
*Expansion
 1e-05,
*Specific Heat
 0.209946,
*Material, name=LAYER_09_CARBONATE
*Conductivity
 1.298,
*Density
 2709.91,
*Elastic
 2.93e+10, 0.2
*Expansion
 1e-05,
*Specific Heat
 0.209946,
*Mohr Coulomb
 29.7, 7.5
*Mohr Coulomb Hardening
 2.00017e+07,0.
*Material, name=STEEL
*Conductivity
 45.3452,
*Density
7935.,
*Elastic
 2.06843e+11, 0.3
*Expansion
 0.0001242,
*Specific Heat
 460.9,
**
** INTERACTION PROPERTIES
**
*Surface Interaction, name=C_FASEI
1.,
*Friction, slip tolerance=0.005
 0.5,
*Surface Behavior, pressure-overclosure=HARD
*Time Points, name=timePoint
1., 3600., 7200., 14400., 28800., 57600., 86400., 172800.
345600., 691200., 1.3824e+06, 2.7648e+06, 5.5296e+06, 1.10592e+07, 2.21184e+07, 3.1536e+07
6.3072e+07, 1.26144e+08, 2.52288e+08, 5.04576e+08, 9.4608e+08
**
** PHYSICAL CONSTANTS
**
*Physical Constants, absolute zero=0., stefan boltzmann=5.67037e-08
**
** BOUNDARY CONDITIONS
**
** Name: FIX_FASEI_WELL Type: Symmetry/Antisymmetry/Encastre
*Boundary
FASEI_OPEN_WELL, XSYMM
** Name: PIN_FASEI Type: Symmetry/Antisymmetry/Encastre
*Boundary
PIPE_INST.FASEI_REV, PINNED
** Name: XSYM_ROCK_BC Type: Symmetry/Antisymmetry/Encastre
*Boundary
ROCK_BC, XSYMM
** Name: YSYM_BASE Type: Symmetry/Antisymmetry/Encastre
*Boundary
YSYM_BASE, YSYMM
** Name: YSYM_TOP Type: Symmetry/Antisymmetry/Encastre
*Boundary
YSYM_TOP, YSYMM
**
** PREDEFINED FIELDS
**
** Name: NT_FASEI   Type: Temperature Using Field: Geotermico
*Initial Conditions, type=TEMPERATURE
FLUID_INST.1, 345.356
FLUID_INST.2, 345.356
FLUID_INST.3, 351.697
FLUID_INST.4, 351.697
FLUID_INST.5, 341.093
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PIPE_INST.2804, 277.257
** Name: NT_FASEI_ID   Type: Temperature Using Field: Geotermico
*Initial Conditions, type=TEMPERATURE
PIPE_INST.2, 345.356
PIPE_INST.3, 351.697
PIPE_INST.6, 341.093
PIPE_INST.8, 330.436
PIPE_INST.10, 328.304
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PIPE_INST.1422, 287.701
** Name: NT_L1-I   Type: Temperature Using Field: NT_L1-I
*Initial Conditions, type=TEMPERATURE
ROCK_INST.17, 287.859
ROCK_INST.18, 287.859
ROCK_INST.19, 277.2
ROCK_INST.20, 277.2
ROCK_INST.1170, 287.859
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ROCK_INST.17525, 277.307
** Name: NT_L1-I_OD   Type: Temperature Using Field: NT_L1-I
*Initial Conditions, type=TEMPERATURE
ROCK_INST.17, 287.859
ROCK_INST.19, 277.2
ROCK_INST.1412, 287.752
ROCK_INST.1413, 287.646
ROCK_INST.1414, 287.539
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ROCK_INST.1510, 277.307
** Name: NT_L2-I   Type: Temperature Using Field: NT_L2-I
*Initial Conditions, type=TEMPERATURE
ROCK_INST.15, 311.261
ROCK_INST.16, 311.261
ROCK_INST.17, 287.814
ROCK_INST.18, 287.814
ROCK_INST.819, 311.261
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ROCK_INST.15248, 287.921
** Name: NT_L2-I_OD   Type: Temperature Using Field: NT_L2-I
*Initial Conditions, type=TEMPERATURE
ROCK_INST.15, 311.261
ROCK_INST.17, 287.814
ROCK_INST.951, 311.154
ROCK_INST.952, 311.047
ROCK_INST.953, 310.941
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ROCK_INST.1169, 287.921
** Name: NT_L3-I   Type: Temperature Using Field: NT_L3-I
*Initial Conditions, type=TEMPERATURE
ROCK_INST.13, 322.927
ROCK_INST.14, 322.927
ROCK_INST.15, 311.206
ROCK_INST.16, 311.206
ROCK_INST.668, 322.927
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ROCK_INST.10211, 311.312
** Name: NT_L3-I_OD   Type: Temperature Using Field: NT_L3-I
*Initial Conditions, type=TEMPERATURE
ROCK_INST.13, 322.927
ROCK_INST.15, 311.206
ROCK_INST.710, 322.82
ROCK_INST.711, 322.714
ROCK_INST.712, 322.607
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ROCK_INST.818, 311.312
** Name: NT_L4-I   Type: Temperature Using Field: NT_L4-I
*Initial Conditions, type=TEMPERATURE
ROCK_INST.11, 325.083
ROCK_INST.12, 325.083
ROCK_INST.13, 322.951
ROCK_INST.14, 322.951
ROCK_INST.597, 325.083
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ROCK_INST.7704, 323.058
** Name: NT_L4-I_OD   Type: Temperature Using Field: NT_L4-I
*Initial Conditions, type=TEMPERATURE
ROCK_INST.11, 325.083
ROCK_INST.13, 322.951
ROCK_INST.649, 324.976
ROCK_INST.650, 324.87
ROCK_INST.651, 324.763
ROCK_INST.652, 324.656
ROCK_INST.653, 324.55
ROCK_INST.654, 324.443
ROCK_INST.655, 324.337
ROCK_INST.656, 324.23
ROCK_INST.657, 324.124
ROCK_INST.658, 324.017
ROCK_INST.659, 323.911
ROCK_INST.660, 323.804
ROCK_INST.661, 323.697
ROCK_INST.662, 323.591
ROCK_INST.663, 323.484
ROCK_INST.664, 323.378
ROCK_INST.665, 323.271
ROCK_INST.666, 323.165
ROCK_INST.667, 323.058
** Name: NT_L5-I   Type: Temperature Using Field: NT_L5-I
*Initial Conditions, type=TEMPERATURE
ROCK_INST.9, 328.311
ROCK_INST.10, 328.311
ROCK_INST.11, 325.114
ROCK_INST.12, 325.114
ROCK_INST.526, 328.311
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ROCK_INST.7267, 325.221
** Name: NT_L5-I_OD   Type: Temperature Using Field: NT_L5-I
*Initial Conditions, type=TEMPERATURE
ROCK_INST.9, 328.311
ROCK_INST.11, 325.114
ROCK_INST.568, 328.205
ROCK_INST.569, 328.098
ROCK_INST.570, 327.992
ROCK_INST.571, 327.885
ROCK_INST.572, 327.779
ROCK_INST.573, 327.672
ROCK_INST.574, 327.565
ROCK_INST.575, 327.459
ROCK_INST.576, 327.352
ROCK_INST.577, 327.246
ROCK_INST.578, 327.139
ROCK_INST.579, 327.033
ROCK_INST.580, 326.926
ROCK_INST.581, 326.819
ROCK_INST.582, 326.713
ROCK_INST.583, 326.606
ROCK_INST.584, 326.5
ROCK_INST.585, 326.393
ROCK_INST.586, 326.287
ROCK_INST.587, 326.18
ROCK_INST.588, 326.073
ROCK_INST.589, 325.967
ROCK_INST.590, 325.86
ROCK_INST.591, 325.754
ROCK_INST.592, 325.647
ROCK_INST.593, 325.541
ROCK_INST.594, 325.434
ROCK_INST.595, 325.327
ROCK_INST.596, 325.221
** Name: NT_L6-I   Type: Temperature Using Field: NT_L6-I
*Initial Conditions, type=TEMPERATURE
ROCK_INST.7, 330.44
ROCK_INST.8, 330.44
ROCK_INST.9, 328.309
ROCK_INST.10, 328.309
ROCK_INST.385, 330.44
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ROCK_INST.6600, 328.415
** Name: NT_L6-I_OD   Type: Temperature Using Field: NT_L6-I
*Initial Conditions, type=TEMPERATURE
ROCK_INST.7, 330.44
ROCK_INST.9, 328.309
ROCK_INST.507, 330.333
ROCK_INST.508, 330.227
ROCK_INST.509, 330.12
ROCK_INST.510, 330.014
ROCK_INST.511, 329.907
ROCK_INST.512, 329.801
ROCK_INST.513, 329.694
ROCK_INST.514, 329.587
ROCK_INST.515, 329.481
ROCK_INST.516, 329.374
ROCK_INST.517, 329.268
ROCK_INST.518, 329.161
ROCK_INST.519, 329.055
ROCK_INST.520, 328.948
ROCK_INST.521, 328.841
ROCK_INST.522, 328.735
ROCK_INST.523, 328.628
ROCK_INST.524, 328.522
ROCK_INST.525, 328.415
** Name: NT_L7-I   Type: Temperature Using Field: NT_L7-I
*Initial Conditions, type=TEMPERATURE
ROCK_INST.5, 341.13
ROCK_INST.6, 341.13
ROCK_INST.7, 330.471
ROCK_INST.8, 330.471
ROCK_INST.224, 341.13
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ROCK_INST.6163, 330.578
** Name: NT_L7-I_OD   Type: Temperature Using Field: NT_L7-I
*Initial Conditions, type=TEMPERATURE
ROCK_INST.5, 341.13
ROCK_INST.7, 330.471
ROCK_INST.286, 341.023
ROCK_INST.287, 340.917
ROCK_INST.288, 340.81
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ROCK_INST.384, 330.578
** Name: NT_L8-I   Type: Temperature Using Field: NT_L8-I
*Initial Conditions, type=TEMPERATURE
ROCK_INST.1, 345.348
ROCK_INST.2, 345.348
ROCK_INST.5, 341.086
ROCK_INST.6, 341.086
ROCK_INST.21, 345.348
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ROCK_INST.3886, 341.192
** Name: NT_L8-I_OD   Type: Temperature Using Field: NT_L8-I
*Initial Conditions, type=TEMPERATURE
ROCK_INST.1, 345.348
ROCK_INST.5, 341.086
ROCK_INST.185, 345.242
ROCK_INST.186, 345.135
ROCK_INST.187, 345.029
ROCK_INST.188, 344.922
ROCK_INST.189, 344.816
ROCK_INST.190, 344.709
ROCK_INST.191, 344.602
ROCK_INST.192, 344.496
ROCK_INST.193, 344.389
ROCK_INST.194, 344.283
ROCK_INST.195, 344.176
ROCK_INST.196, 344.07
ROCK_INST.197, 343.963
ROCK_INST.198, 343.857
ROCK_INST.199, 343.75
ROCK_INST.200, 343.643
ROCK_INST.201, 343.537
ROCK_INST.202, 343.43
ROCK_INST.203, 343.324
ROCK_INST.204, 343.217
ROCK_INST.205, 343.111
ROCK_INST.206, 343.004
ROCK_INST.207, 342.897
ROCK_INST.208, 342.791
ROCK_INST.209, 342.684
ROCK_INST.210, 342.578
ROCK_INST.211, 342.471
ROCK_INST.212, 342.365
ROCK_INST.213, 342.258
ROCK_INST.214, 342.151
ROCK_INST.215, 342.045
ROCK_INST.216, 341.938
ROCK_INST.217, 341.832
ROCK_INST.218, 341.725
ROCK_INST.219, 341.619
ROCK_INST.220, 341.512
ROCK_INST.221, 341.405
ROCK_INST.222, 341.299
ROCK_INST.223, 341.192
** Name: NT_L9-I   Type: Temperature Using Field: NT_L9-I
*Initial Conditions, type=TEMPERATURE
ROCK_INST.1, 345.311
ROCK_INST.2, 345.311
ROCK_INST.3, 351.705
ROCK_INST.4, 351.705
ROCK_INST.21, 345.311
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ROCK_INST.2989, 351.598
** Name: NT_L9-I_OD   Type: Temperature Using Field: NT_L9-I
*Initial Conditions, type=TEMPERATURE
ROCK_INST.1, 345.311
ROCK_INST.4, 351.705
ROCK_INST.126, 351.598
ROCK_INST.127, 351.492
ROCK_INST.128, 351.385
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ROCK_INST.184, 345.418
** Name: S_FASEI_REV   Type: Geostatic stress
*Initial Conditions, type=STRESS, GEOSTATIC
PIPE_INST.FASEI_REV, 2.01485e+08, -2000., -7.09631e+07, -5500., 0., 0.
** Name: S_L1-I   Type: Geostatic stress
*Initial Conditions, type=STRESS, GEOSTATIC
ROCK_INST.L1-I, -1.99834e+07, -2000., -3.1263e+07, -2500., 1., 1.
** Name: S_L2-I   Type: Geostatic stress
*Initial Conditions, type=STRESS, GEOSTATIC
ROCK_INST.L2-I, -3.1263e+07, -2500., -5.60815e+07, -3600., 1., 1.
** Name: S_L3-I   Type: Geostatic stress
*Initial Conditions, type=STRESS, GEOSTATIC
ROCK_INST.L3-I, -5.60815e+07, -3600., -6.77893e+07, -4150., 1., 1.
** Name: S_L4-I   Type: Geostatic stress
*Initial Conditions, type=STRESS, GEOSTATIC
ROCK_INST.L4-I, -6.77893e+07, -4150., -6.93588e+07, -4250., 1., 1.
** Name: S_L5-I   Type: Geostatic stress
*Initial Conditions, type=STRESS, GEOSTATIC
ROCK_INST.L5-I, -6.93588e+07, -4250., -7.25519e+07, -4400., 1., 1.
** Name: S_L6-I   Type: Geostatic stress
*Initial Conditions, type=STRESS, GEOSTATIC
ROCK_INST.L6-I, -7.25519e+07, -4400., -7.46806e+07, -4500., 1., 1.
** Name: S_L7-I   Type: Geostatic stress
*Initial Conditions, type=STRESS, GEOSTATIC
ROCK_INST.L7-I, -7.46806e+07, -4500., -8.53241e+07, -5000., 1., 1.
** Name: S_L8-I   Type: Geostatic stress
*Initial Conditions, type=STRESS, GEOSTATIC
ROCK_INST.L8-I, -8.53241e+07, -5000., -9.10499e+07, -5200., 1., 1.
** Name: S_L9-I   Type: Geostatic stress
*Initial Conditions, type=STRESS, GEOSTATIC
ROCK_INST.L9-I, -9.10499e+07, -5200., -9.90252e+07, -5500., 1., 1.
**
** INTERACTIONS
**
** Interaction: C_FASEI
*Contact Pair, interaction=C_FASEI, type=SURFACE TO SURFACE
ROCK_INST_FASEI_SLAVE_CNS_, FASEI_MASTER
** ----------------------------------------------------------------
**
** STEP: Geostatic
**
*Step, name=Geostatic, nlgeom=YES
*Geostatic
**
** LOADS
**
** Name: GRAVITY   Type: Gravity
*Dload, op=NEW
, GRAV, 9.81, , -1.
**
** INTERACTIONS
**
** Interaction: C_FASEI
*Model Change, type=CONTACT PAIR, remove
ROCK_INST_FASEI_SLAVE_CNS_, FASEI_MASTER
** Interaction: MC_FASEI_FLUIDO
*Model Change, remove
FLUID_INST.FASEI_FLUIDO,
** Interaction: MC_FASEI_REV
*Model Change, remove
PIPE_INST.FASEI_REV,
**
** OUTPUT REQUESTS
**
*Restart, write, frequency=0
**
** FIELD OUTPUT: FASEI_REV
**
*Output, field
*Node Output, nset=PIPE_INST.FASEI_REV
NT, U
*Element Output, elset=PIPE_INST.FASEI_REV, directions=YES
E, MISES, PE, S, PEEQ
**
** FIELD OUTPUT: ROCK_OUTPUT
**
*Node Output, nset=ROCK_OUTPUT
U,
*Element Output, elset=ROCK_OUTPUT, directions=YES
TEMP,
*Output, history, frequency=0
*End Step
** ----------------------------------------------------------------
**
** STEP: Transition
**
*Step, name=Transition, nlgeom=YES
*Static
1., 2., 2e-05, 2.
**
** LOADS
**
** Name: GRAVITY   Type: Gravity
*Dload, op=NEW
, GRAV, 9.81, , -1.
**
** OUTPUT REQUESTS
**
*Restart, write, frequency=0
**
** FIELD OUTPUT: FASEI_REV
**
*Output, field, time points=timePoint
*Node Output, nset=PIPE_INST.FASEI_REV
NT, U
*Element Output, elset=PIPE_INST.FASEI_REV, directions=YES
E, MISES, PE, S, PEEQ
**
** FIELD OUTPUT: ROCK_OUTPUT
**
*Node Output, nset=ROCK_OUTPUT
U,
*Element Output, elset=ROCK_OUTPUT, directions=YES
TEMP,
*Output, history, frequency=0
*End Step
** ----------------------------------------------------------------
**
** STEP: TempDefine
**
*Step, name=TempDefine, nlgeom=YES
*Static
1., 3., 3e-05, 3.
**
** LOADS
**
** Name: GRAVITY   Type: Gravity
*Dload, op=NEW
, GRAV, 9.81, , -1.
**
** OUTPUT REQUESTS
**
*Restart, write, frequency=0
**
** FIELD OUTPUT: FASEI_REV
**
*Output, field, time points=timePoint
*Node Output, nset=PIPE_INST.FASEI_REV
NT, U
*Element Output, elset=PIPE_INST.FASEI_REV, directions=YES
E, MISES, PE, S, PEEQ
**
** FIELD OUTPUT: ROCK_OUTPUT
**
*Node Output, nset=ROCK_OUTPUT
U,
*Element Output, elset=ROCK_OUTPUT, directions=YES
TEMP,
*Output, history, frequency=0
*End Step
** ----------------------------------------------------------------
**
** STEP: Perf_10_375
**
*Step, name=Perf_10_375, nlgeom=YES
*Static
1., 1., 1e-05, 1.
**
** BOUNDARY CONDITIONS
**
** Name: FIX_FASEI_WELL Type: Symmetry/Antisymmetry/Encastre
*Boundary, op=NEW
** Name: PIN_FASEI Type: Symmetry/Antisymmetry/Encastre
*Boundary, op=NEW
PIPE_INST.FASEI_REV, PINNED
** Name: XSYM_ROCK_BC Type: Symmetry/Antisymmetry/Encastre
*Boundary, op=NEW
ROCK_BC, XSYMM
** Name: YSYM_BASE Type: Symmetry/Antisymmetry/Encastre
*Boundary, op=NEW
YSYM_BASE, YSYMM
** Name: YSYM_TOP Type: Symmetry/Antisymmetry/Encastre
*Boundary, op=NEW
YSYM_TOP, YSYMM
**
** LOADS
**
** Name: GRAVITY   Type: Gravity
*Dload, op=NEW
, GRAV, 9.81, , -1.
** Name: P_FASEI_OPEN_WELL   Type: Pressure Using Field: P_FASEI_OPEN_WELL
*Dload, op=NEW
ROCK_INST.24, P2, 5.19818e+07
ROCK_INST.48, P2, 5.20317e+07
ROCK_INST.72, P2, 5.20817e+07
ROCK_INST.96, P2, 5.21316e+07
ROCK_INST.120, P2, 5.21816e+07
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ROCK_INST.16777, P4, 2.00084e+07
**
** OUTPUT REQUESTS
**
*Restart, write, frequency=0
**
** FIELD OUTPUT: FASEI_REV
**
*Output, field, time points=timePoint
*Node Output, nset=PIPE_INST.FASEI_REV
NT, U
*Element Output, elset=PIPE_INST.FASEI_REV, directions=YES
E, MISES, PE, S, PEEQ
**
** FIELD OUTPUT: ROCK_OUTPUT
**
*Node Output, nset=ROCK_OUTPUT
U,
*Element Output, elset=ROCK_OUTPUT, directions=YES
TEMP,
*Output, history, frequency=0
*End Step
** ----------------------------------------------------------------
**
** STEP: Perf_10_375_Creep
**
*Step, name=Perf_10_375_Creep, nlgeom=YES, inc=1000000
*Visco, cetol=0.0001
1e-06, 172800., 1e-15, 172800.
**
** LOADS
**
** Name: GRAVITY   Type: Gravity
*Dload, op=NEW
, GRAV, 9.81, , -1.
** Name: P_FASEI_OPEN_WELL   Type: Pressure Using Field: P_FASEI_OPEN_WELL
*Dload, op=NEW
ROCK_INST.24, P2, 5.19818e+07
ROCK_INST.48, P2, 5.20317e+07
ROCK_INST.72, P2, 5.20817e+07
ROCK_INST.96, P2, 5.21316e+07
ROCK_INST.120, P2, 5.21816e+07
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ROCK_INST.16777, P4, 2.00084e+07
**
** OUTPUT REQUESTS
**
*Restart, write, frequency=0
**
** FIELD OUTPUT: FASEI_REV
**
*Output, field, time points=timePoint
*Node Output, nset=PIPE_INST.FASEI_REV
NT, U
*Element Output, elset=PIPE_INST.FASEI_REV, directions=YES
E, MISES, PE, S, PEEQ
**
** FIELD OUTPUT: ROCK_OUTPUT
**
*Node Output, nset=ROCK_OUTPUT
U,
*Element Output, elset=ROCK_OUTPUT, directions=YES
TEMP,
*Output, history, frequency=0
*End Step
** ----------------------------------------------------------------
**
** STEP: Rev_9_875
**
*Step, name=Rev_9_875, nlgeom=YES
*Static
1., 1., 1e-15, 1.
**
** BOUNDARY CONDITIONS
**
** Name: PIN_FASEI Type: Symmetry/Antisymmetry/Encastre
*Boundary, op=NEW
** Name: XSYM_ROCK_BC Type: Symmetry/Antisymmetry/Encastre
*Boundary, op=NEW
ROCK_BC, XSYMM
** Name: YSYM_BASE Type: Symmetry/Antisymmetry/Encastre
*Boundary, op=NEW
YSYM_BASE, YSYMM
** Name: YSYM_TOP Type: Symmetry/Antisymmetry/Encastre
*Boundary, op=NEW
YSYM_TOP, YSYMM
**
** LOADS
**
** Name: GRAVITY   Type: Gravity
*Dload, op=NEW
, GRAV, 9.81, , -1.
** Name: P_FASEI_COMPLETED_WELL   Type: Pressure Using Field: P_FASEI_COMPLETED_WELL
*Dload, op=NEW
PIPE_INST.3, P2, 5.19818e+07
PIPE_INST.6, P2, 5.20317e+07
PIPE_INST.9, P2, 5.20817e+07
PIPE_INST.12, P2, 5.21316e+07
PIPE_INST.15, P2, 5.21816e+07
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PIPE_INST.2098, P4, 2.00084e+07
** Name: P_FASEI_FLUID   Type: Pressure Using Field: P_FASEI_FLUID
*Dload, op=NEW
PIPE_INST.1, P4, 5.19818e+07
PIPE_INST.4, P4, 5.20317e+07
PIPE_INST.7, P4, 5.20817e+07
PIPE_INST.10, P4, 5.21316e+07
PIPE_INST.13, P4, 5.21816e+07
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ROCK_INST.16777, P4, 2.00084e+07
** Name: P_FASEI_OPEN_WELL   Type: Pressure Using Field: P_FASEI_OPEN_WELL
*Dload, op=NEW
**
** INTERACTIONS
**
** Interaction: C_FASEI
*Model Change, type=CONTACT PAIR, add
ROCK_INST_FASEI_SLAVE_CNS_, FASEI_MASTER
** Interaction: MC_FASEI_REV
*Model Change, add
PIPE_INST.FASEI_REV,
**
** OUTPUT REQUESTS
**
*Restart, write, frequency=0
**
** FIELD OUTPUT: FASEI_REV
**
*Output, field, time points=timePoint
*Node Output, nset=PIPE_INST.FASEI_REV
NT, U
*Element Output, elset=PIPE_INST.FASEI_REV, directions=YES
E, MISES, PE, S, PEEQ
**
** FIELD OUTPUT: ROCK_OUTPUT
**
*Node Output, nset=ROCK_OUTPUT
U,
*Element Output, elset=ROCK_OUTPUT, directions=YES
TEMP,
*Output, history, frequency=0
*End Step
** ----------------------------------------------------------------
**
** STEP: Rev_9_875_Creep
**
*Step, name=Rev_9_875_Creep, nlgeom=YES, inc=1000000
*Visco, cetol=0.0001
1e-06, 9.4608e+08, 1e-15, 1.5552e+07
**
** LOADS
**
** Name: GRAVITY   Type: Gravity
*Dload, op=NEW
, GRAV, 9.81, , -1.
** Name: P_FASEI_COMPLETED_WELL   Type: Pressure Using Field: P_FASEI_COMPLETED_WELL
*Dload, op=NEW
PIPE_INST.3, P2, 5.19818e+07
PIPE_INST.6, P2, 5.20317e+07
PIPE_INST.9, P2, 5.20817e+07
PIPE_INST.12, P2, 5.21316e+07
PIPE_INST.15, P2, 5.21816e+07
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PIPE_INST.2098, P4, 2.00084e+07
** Name: P_FASEI_FLUID   Type: Pressure Using Field: P_FASEI_FLUID
*Dload, op=NEW
PIPE_INST.1, P4, 5.19818e+07
PIPE_INST.4, P4, 5.20317e+07
PIPE_INST.7, P4, 5.20817e+07
PIPE_INST.10, P4, 5.21316e+07
PIPE_INST.13, P4, 5.21816e+07
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ROCK_INST.16777, P4, 2.00084e+07
**
** OUTPUT REQUESTS
**
*Restart, write, frequency=0
**
** FIELD OUTPUT: FASEI_REV
**
*Output, field, time points=timePoint
*Node Output, nset=PIPE_INST.FASEI_REV
NT, U
*Element Output, elset=PIPE_INST.FASEI_REV, directions=YES
E, MISES, PE, S, PEEQ
**
** FIELD OUTPUT: ROCK_OUTPUT
**
*Node Output, nset=ROCK_OUTPUT
U,
*Element Output, elset=ROCK_OUTPUT, directions=YES
TEMP,
*Output, history, frequency=0
*End Step
